ORIGIN := 1
test := [1; 3; 4; 2; 3]
data := [4; 7; 15; 17; 2; 18; 16; 10; 14; 12; 10; 8; 9; 9; 9; 3; 9]
data_sort := sort(data)
test_sort := sort(test) = [1; 2; 3; 3; 4]
n := length(data) = 17
mean(data) = 10.1176  # Mittelwert
var(data) = 21.1626
emp. - Varianz
n_test := length(test) = 5
stdev(data) = 4.60029
emp. - (Std - Abweichung)
MIN := min(data) = 2
n_test*0.5 = 2.5
MAX := max(data) = 18
Q5 := test_sort[3] = 3
n*0.25 = 4.25
Q1 := data_sort[5] = 8
n*0.5 = 8.5
Q2 := data_sort[9] = 9
n*0.75 = 12.75
Q3 := data_sort[13] = 14
Spannweite := MAX - MIN = 16
IQ := Q3 - Q1 = 6
